// COMSOL Multiphysics 5.1.0.234 model "Three_space_dipole.mph"
// Outline of the model tree

Geometry
  geom1 "Geometry 1" (2D, length unit m)
    r1: Rectangle | pos = {0, 0}; type = solid; base = corner; size = {5, 2}
    r2: Rectangle | pos = {0, 2}; type = solid; base = corner; size = {5, 1}
    pt1: Point | p = {2.5, 2.5}
    r3: Rectangle | pos = {0, 3}; type = solid; base = corner; size = {5, 2}
    fin: Finalize "Form Union"

Materials
  mat1: Common "upper" on domains 1-3
    def "Basic"
      relpermittivity = 1.0
      relpermeability = 1
      electricconductivity = 0
  mat2: Common "lower" on domains 2
    def "Basic"
      relpermittivity = 10.9
      relpermeability = 1
      electricconductivity = 0

Physics
  emw: ElectromagneticWaves "Electromagnetic Waves, Frequency Domain" on all domains
    dependent variable E = {Ex, Ey, Ez}
    wee1: WaveEquationElectric (default)
    pec1: PerfectElectricConductor (default)
    init1: init "Initial Values 1" (default)
    lco1: LineCurrentOutOfPlane (disabled) on points 5 | Iop = 1
    sctr1: Scattering "Scattering Boundary Condition 1" on boundaries 1-3, 5-10
      IncidentField = NoIncidentField
      WaveType = CylindricalWave
      r0 = {2.5, 2.5, 0}
      Order = SecondOrder
    epd1: ElectricPointDipole on points 5
      DipoleSpecification = DipoleMoment
      pI = {1, 0, 0}
      enpI = {1, 0, 0}
      normpI = 100

Mesh
  mesh1 "Mesh 1"
    size: MeshSizeDefault | hmax = 0.05; hauto = 1; custom = off
    auto_f1: FreeTri "Free Triangular 1" on remaining entities
      xscale = 1
      yscale = 1
      smoothcontrol = on
      smoothmaxiter = 8
      smoothmaxdepth = 8

Studies
  std1 "Study 1"
    freq: Frequency "Frequency Domain" | punit = Hz; plist = 3e8

Solver configurations
  sol1 "Solution 1" (study std1)
    v1: Variables "Dependent Variables 1"
    s1: Stationary "Stationary Solver 1"
      dDef: Direct
      p1: Parametric | pname = freq; plistarr = 3e8; punit = Hz; pcontinuationmode = no
      fc1: FullyCoupled | linsolver = dDef

Datasets
  dset1: Solution | solution = sol1

Plots
  pg1: PlotGroup2D "Electric Field (emw)" | data = dset1
    surf1: Surface | expr = imag(emw.Ex)
  pg2: PlotGroup2D "2D Plot Group 2" | data = dset1
    surf1: Surface | expr = real(emw.Ex)
  pg3: PlotGroup2D "2D Plot Group 3" | data = dset1
    surf1: Surface | expr = real(emw.Ey)
  pg4: PlotGroup2D "2D Plot Group 4" | data = dset1
    surf1: Surface | expr = imag(emw.Ey)

Exports
  plot1: Plot | filename = D:\comsol materials\field.txt